units		lj
comm_modify cutoff 2.0
atom_style	bond
special_bonds   fene
bond_style      fene
pair_style	lj/cut 1.12246
read_data	N100M100.data
neighbor	0.4 bin
neigh_modify	every 1 delay 1
bond_coeff	1 30.0 1.5 1.0 1.0
pair_modify	shift yes
pair_coeff	1 1 1.0 1.0 1.12246
change_box	all triclinic
thermo          1000
timestep	0.01
fix 1 all langevin 1.0 1.0 2.0 904297
fix 2 all nve

variable a loop 100 pad
label loop
run 10
write_data N100M100.$a.data
next a
jump SELF loop
